clock
{
	starttime "2020-01-01 00:00:00";
	stoptime "2020-01-05 00:00:00";
}

#input "https://s3-us-west-1.amazonaws.com/weather.arras.energy/test_data/visualcrossing.csv" -o test_data.glm -f visualcrossing-weather -t weather -p location="Menlo Park, CA" -p refresh=always

module tape;
object recorder
{
	parent "test_data";
	file "weather_recorder.csv";
	property "temperature,humidity,wind_speed,opq_sky_cov";
}
