#ifexist ../case${CASE}.py
#system cp ../case${CASE}.py .
#define DIR=..
#endif

#set suppress_repeat_messages=FALSE

clock
{
    timezone "PST+8PDT";
    starttime "2020-01-01 00:00:00 PST";
    stoptime "2020-02-01 00:00:00 PST";
}

#input "case${CASE}.py" -t pypower

#for OBJ in ${FIND class=shunt}
#modify ${OBJ}.status OFFLINE;
#done

#gridlabd -C "case${CASE}.glm" -D "starttime=${starttime}" -o "case${CASE}_ref.json"

#set savefile=case${CASE}.json

#on_exit 0 python3 ${DIR:-.}/check_case.py case${CASE}.json case${CASE}_ref.json pp_bus_1/Vm
