#define CASE=14
#ifexists "../case.glm"
#define DIR=..
#endif

// #set debug=TRUE
// #set suppress_repeat_messages=FALSE

module pypower
{
    maximum_timestep 3600;
}

module tape
{
    csv_header_type NAME;
}

module tape
{
    csv_header_type NAME;
}

object pypower.load
{
    parent pp_bus_2;
    Vn 12.5 kV;
    object player
    {
        file "${DIR:-.}/test_case14_load_pp_bus_2.csv";
    };
    status ONLINE;
}

object pypower.powerplant
{
    parent pp_gen_2;
    S 10.0;
    status ONLINE;
    startup_cost 1.0;
    shutdown_cost 0.5;
    fixed_cost 0.1;
    variable_cost 0.3;
    scarcity_cost 0.7;
}

#include "${DIR:-.}/case.glm"

object recorder
{
    parent pp_bus_2;
    property S,Pd,Qd,Gs,Bs,Vm,Va;
    interval 3600;
    file "test_case14_powerplant_pp_bus_2_record.csv";
}

#ifdef ../${modelname/.glm/}_pp_bus_2_record.csv
#on_exit 0 diff ../test_case14_powerplant_pp_bus_2_record.csv ${modelname/.glm/}_pp_bus_2_record.csv > gridlabd.diff
#endif
