#define CASE=14
#ifexists "../case.glm"
#define DIR=..
#endif

//#option debug

module pypower
{
#ifdef DIR
    controllers_path "${DIR}";
#endif
    controllers "controllers";
}

module tape
{
    csv_header_type NAME;
}
object pypower.powerplant
{
    parent pp_bus_2;
    status ONLINE;
    controller "storage_control";
    charging_capacity 15 kW;
    storage_capacity 10 MWh;
    storage_efficiency 0.95;
    object recorder
    {
        file "${modelname/.glm/_record.csv}";
        property S,state_of_charge;
    };
}

#include "${DIR:-.}/case.glm"

clock
{
    timezone "PST+8PDT";
    starttime "2020-01-01 00:00:00 PST";
    stoptime "2020-01-02 00:00:00 PST";
}

module assert;
#define MRES=0.05 // magnitude test resolution
#define ARES=0.2 // angle test resolution
#define PRES=0.1 // real power test resolution
#define QRES=0.1 // reactive power test resolution

object assert
{
    parent pp_bus_2;
    target Pd;
    relation ==;
    value 21.7;
    within ${PRES};
}
object assert
{
    parent pp_bus_2;
    target Qd;
    relation ==;
    value 12.7;
    within ${QRES};
}

object assert
{
    parent pp_bus_1;
    target Vm;
    relation ==;
    value 1.060;
    within ${MRES};
}
object assert
{
    parent pp_bus_1;
    target Va;
    relation ==;
    value 0.00;
    within ${ARES};
}

object assert
{
    parent pp_bus_2;
    target Vm;
    relation ==;
    value 1.045;
    within ${MRES};
}
object assert
{
    parent pp_bus_2;
    target Va;
    relation ==;
    value -4.98;
    within ${ARES};
}

object assert
{
    parent pp_bus_3;
    target Vm;
    relation ==;
    value 1.010;
    within ${MRES};
}
object assert
{
    parent pp_bus_3;
    target Va;
    relation ==;
    value -12.72;
    within ${ARES};
}

object assert
{
    parent pp_bus_4;
    target Vm;
    relation ==;
    value 1.019;
    within ${MRES};
}
object assert
{
    parent pp_bus_4;
    target Va;
    relation ==;
    value -10.33;
    within ${ARES};
}

object assert
{
    parent pp_bus_5;
    target Vm;
    relation ==;
    value 1.020;
    within ${MRES};
}
object assert
{
    parent pp_bus_5;
    target Va;
    relation ==;
    value -8.78;
    within ${ARES};
}

object assert
{
    parent pp_bus_6;
    target Vm;
    relation ==;
    value 1.070;
    within ${MRES};
}
object assert
{
    parent pp_bus_6;
    target Va;
    relation ==;
    value -14.22;
    within ${ARES};
}

object assert
{
    parent pp_bus_7;
    target Vm;
    relation ==;
    value 1.062;
    within ${MRES};
}
object assert
{
    parent pp_bus_7;
    target Va;
    relation ==;
    value -13.37;
    within ${ARES};
}

object assert
{
    parent pp_bus_8;
    target Vm;
    relation ==;
    value 1.090;
    within ${MRES};
}
object assert
{
    parent pp_bus_8;
    target Va;
    relation ==;
    value -13.36;
    within ${ARES};
}

object assert
{
    parent pp_bus_9;
    target Vm;
    relation ==;
    value 1.056;
    within ${MRES};
}
object assert
{
    parent pp_bus_9;
    target Va;
    relation ==;
    value -14.94;
    within ${ARES};
}

object assert
{
    parent pp_bus_10;
    target Vm;
    relation ==;
    value 1.051;
    within ${MRES};
}
object assert
{
    parent pp_bus_10;
    target Va;
    relation ==;
    value -15.10;
    within ${ARES};
}

object assert
{
    parent pp_bus_11;
    target Vm;
    relation ==;
    value 1.057;
    within ${MRES};
}
object assert
{
    parent pp_bus_11;
    target Va;
    relation ==;
    value -14.79;
    within ${ARES};
}

object assert
{
    parent pp_bus_12;
    target Vm;
    relation ==;
    value 1.055;
    within ${MRES};
}
object assert
{
    parent pp_bus_12;
    target Va;
    relation ==;
    value -15.07;
    within ${ARES};
}

object assert
{
    parent pp_bus_13;
    target Vm;
    relation ==;
    value 1.050;
    within ${MRES};
}
object assert
{
    parent pp_bus_13;
    target Va;
    relation ==;
    value -15.16;
    within ${ARES};
}

object assert
{
    parent pp_bus_14;
    target Vm;
    relation ==;
    value 1.036;
    within ${MRES};
}
object assert
{
    parent pp_bus_14;
    target Va;
    relation ==;
    value -16.04;
    within ${ARES};
}
