#define CASE=14
#ifexists "../case.glm"
#define DIR=..
#endif
#include "${DIR:-.}/case.glm"

module pypower
{
	maximum_timestep 3600;
    enable_opf FALSE;
}

module powerflow;
object pypower.load
{
    name load_1;
    parent bus:0;
    Vn 12.5 kV;
    object substation
    {
        phases ABC;
        bustype SWING;
        nominal_voltage 12.5 kV;
        base_power ${pypower::baseMVA};
        power_convergence_value 0.01;
    };
}
