// recorder.glm

#set pythonpath=..:.
module pandas;

class recorder
{
	char1024 property;
	char1024 file;
	double interval[s];
	int16 flush;

	on_init "python:pandas.recorder_init";
	on_commit "python:pandas.recorder_commit";
}

class player
{
	char1024 property;
	char1024 file;
	int32 loop;
	char32 dtformat;

	on_init "python:pandas.player_init";
	on_precommit "python:pandas.player_precommit";
}
