// generated by csv-ceus2glm-ceus.py
object ceus {
    filename "../test_ceus_converter_opt.csv";
    total_real_power "0.0";
    total_reactive_power "0.0";
    total_power_A "0+0i";
    total_power_B "0+0i";
    total_power_C "0+0i";
	name "building";
	floor_area "15000sf";
}
