#set pythonpath=..:.:${pythonpath}

module test_class_event_handler;

class test
{
    char1024 n;
    on_init "python:test_class_event_handler.test_init";
    on_precommit "python:test_class_event_handler.test_precommit";
    on_presync "python:test_class_event_handler.test_presync";
    on_sync "python:test_class_event_handler.test_sync";
    on_postsync "python:test_class_event_handler.test_postsync";
    on_commit "python:test_class_event_handler.test_commit";
    on_finalize "python:test_class_event_handler.test_finalize";
}

object test
{
    n "0";
}

#set savefile=${modelname/glm/json}

#on_exit 0 test "$(gridlabd json-get objects test:0 n < ${modelname/glm/json})" == "01234567"
