// Filter test simple delay

#set randomseed=1

clock
{
	timezone PST+8PDT;
	starttime "2000-01-01 00:00:00 PST";
	stoptime "2000-01-02 00:00:00 PST";
}

filter delay(z,5min) = 1/z;

class from
{
	randomvar value;
}

class to
{
	double value;
}

object from {
	name from;
	value "type:normal(0,1); min:-3.0; max:+3.0; refresh:1min";
}

object to
{
	name to;
	value delay(from:value);
}

#include "pandas.glm"
object recorder
{
	file "${modelname/.glm/.csv}";
	interval -1;
	property "from:value,to:value";
}

#include "assert.glm"

object assert
{
    parent "to";
    start "2000-01-01 00:00:00 PST";
    stop "2000-01-01 00:04:59 PST";
    target value;
    relation EQ;
    dtype float;
    value 0.0;
    within 1e-4;
}
object assert
{
    parent "to";
    start "2000-01-01 00:05:00 PST";
    stop "2000-01-01 00:09:59 PST";
    target value;
    relation EQ;
    dtype float;
    value +0.443108;
    within 1e-4;
}

#ifexist ../${modelname/.glm/.csv}
#on_exit 0 diff ../${modelname/.glm/.csv} ${modelname/.glm/.csv} > gridlabd.diff
#endif
