// Filter test second-order filter

#set randomseed=1;

clock
{
	timezone PST+8PDT;
	starttime "2000-01-01 00:00:00 PST";
	stoptime "2000-01-01 02:00:00 PST";
}

// discrete zoh equivalent of (s-0.1)/(s+0.05)(s+0.02)
filter Gd(z) = ( 0.9168 z - 1.013 ) / ( z^2 - 1.931 z + 0.9324 );

class from
{
	randomvar noise; // noise input
	double step; // step input
}

class to
{
	double value;
}

object from
{
	name "from";
	noise "type:normal(0,1); min:-3.0; max:+3.0; refresh:10min";
	step 1.0;
}

object to
{
	name "to";
	value Gd(from:noise);
}
object to
{
	name "fvt";
	value Gd(from:step);
}

#include "pandas.glm"

object recorder
{
	file "${modelname/.glm/.csv}";
	interval 1;
	property "from:noise,to:value,from:step,fvt:value";
}

#include "assert.glm"

object assert
{
	parent "to";
	start "2000-01-01 01:00:00 PST";
	stop "2000-01-01 01:00:00 PST";
	target value;
	relation EQ;
	dtype float;
	value 106.3941;
	within 1e-4;
}

object assert
{
	parent fvt;
	start "2000-01-01 01:00:00 PST";
	stop "2000-01-01 01:00:00 PST";
	target value;
	relation EQ;
	dtype float;
	value -68.7143;
	within 1e-4;
}

#ifexist ../${modelname/.glm/.csv}
#on_exit 0 diff ../${modelname/.glm/.csv} ${modelname/.glm/.csv} > gridlabd.diff
#endif
