#system rm -f pole_configuration.glm

#library config set CACHEDIR .
#library config set DATADIR .
#library get pole_configuration.glm

#assert -f pole_configuration.glm -a -s pole_configuration.glm

#system rm -f pole_configuration.glm
