// test schedules as analog load shapes

clock {
    timezone "PST+8PDT";
    starttime "2020-01-01 00:00:00 PST";
    stoptime "2020-01-02 00:00:00 PST";
}

#include "pandas.glm"
#include "assert.glm"

schedule hour
{
    * 0 * * * 1.0;
    * 1 * * * 1.0;
    * 2 * * * 1.0;
    * 3 * * * 1.0;
    * 4 * * * 1.0;
    * 5 * * * 1.0;
    * 6 * * * 1.0;
    * 7 * * * 1.0;
    * 8 * * * 1.0;
    * 9 * * * 1.0;
    * 10 * * * 1.0;
    * 11 * * * 1.0;
    * 12 * * * 1.0;
    * 13 * * * 1.0;
    * 14 * * * 1.0;
    * 15 * * * 1.0;
    * 16 * * * 1.0;
    * 17 * * * 1.0;
    * 18 * * * 1.0;
    * 19 * * * 1.0;
    * 20 * * * 1.0;
    * 21 * * * 1.0;
    * 22 * * * 1.0;
    * 23 * * * 1.0;
}

class test
{
    loadshape shape;
}

object test
{
    shape "type:analog; schedule:hour";
    object assert {
        target "shape";
        relation EQ;
        value 1.0;
    };
}
