// test_random_correlation.glm
//
// Verify that random correlations work ok.
//
// Test fails if the maximum covariance error exceeds 0.4%.
// Test also generates a plot of the correlated variables generated, FYI.

#include "pandas.glm"

clock {
    starttime '2020-01-01 00:00:00';
    stoptime '2020-01-02 00:00:00';
}

class example
{
    randomvar x;
    randomvar y;
}

object example
{
    x "type:normal(0.0,1.0); min:-3.0; max:+3.0; refresh:1s;";
    y "type:normal(0.0,0.1); min:-3.0; max:+3.0; refresh:1s; correlation:x*-0.9;";
    object recorder
    {
        property "x,y";
        file "test_random_correlation.csv";
        interval -1;
    };
}

#ifexists "../test_random_correlation.py"
#define DIR=..
#endif

#on_exit 0 $GLD_BIN/python3 ${DIR:-.}/test_random_correlation.py
