// test the geodata elevation dataset using a known location elevation

#ifexist ../path_example.csv
#define DIR=..
#endif

// test a single location
#setenv LOC=37.4150,-122.2056 -f RAW:elevation
#define ANS=87.0
#define RES=${SHELL gridlabd geodata merge -D elevation $LOC --recordsep ' '}
#if "${RES}" != "${ANS}"
    #error "geodata merge -D elevation ${LOC}" is incorrect: expected ${ANS} meters but got ${RES} meters instead
#endif

// test a straight line between two locations at a specified resolution
#setenv LOC=37.4150,-122.2056 37.3880,-122.2884 -r 1000 -f RAW:elevation
#define ANS=87.0 93.0 178.0 113.0 106.0 304.0 408.0 607.0 634.0
#define RES=${SHELL gridlabd geodata merge -D elevation $LOC --recordsep ' '}
#if "${RES}" != "${ANS}"
    #error "geodata -D elevation ${LOC}" is incorrect: expected ${ANS} meters but got ${RES} meters instead
#endif

// test a path
#setenv LOC=${DIR:-.}/path_example.csv -f RAW:elevation
#define ANS=88.0 100.0 111.0 110.0 98.0 91.0 77.0 91.0 80.0 79.0 96.0 82.0 103.0 129.0 109.0 108.0 115.0 124.0 127.0 123.0 117.0 110.0 106.0 116.0 166.0 267.0 285.0 331.0 352.0 340.0 444.0 448.0 505.0 578.0 615.0 642.0 634.0
#define RES=${SHELL gridlabd geodata merge -D elevation $LOC --recordsep ' '}
#if "${RES}" != "${ANS}"
    #error "geodata -D elevation ${LOC}" is incorrect: expected ${ANS} meters but got ${RES} meters instead
#endif

// test a path at a specified resolution
#setenv LOC=${DIR:-.}/path_example.csv -r 500 -f RAW:elevation
#define ANS=88.0 100.0 111.0 110.0 98.0 91.0 77.0 91.0 80.0 79.0 96.0 82.0 103.0 129.0 109.0 108.0 115.0 124.0 127.0 123.0 117.0 110.0 106.0 116.0 167.0 267.0 285.0 308.0 331.0 352.0 341.0 439.0 444.0 448.0 505.0 578.0 615.0 642.0 544.0 634.0
#define RES=${SHELL gridlabd geodata merge -D elevation $LOC --recordsep ' '}
#if "${RES}" != "${ANS}"
    #error "geodata -D elevation ${LOC}" is incorrect: expected ${ANS} meters but got ${RES} meters instead
#endif
