#ifdef USER
#ifexist "../${modelname/.glm/.txt}"
#define DIR=..
#endif

#option redirect output:${modelname/.glm/.txt}

#project help

#flush
#system sync

#ifexist "../${modelname/.glm/.txt}"
#on_exit 0 diff -I '^#' ../${modelname/.glm/.txt} ${modelname/.glm/.txt} > gridlabd.diff
#endif
#endif
