#ifexist ../ieee13.glm
#system cp ../ieee13.glm ieee13.glm
#endif

#begin python

import sys
import json
import gridlabd.edit as edit
import gridlabd.framework as app

fh = app.open_glm("ieee13.glm")[0]
data = edit.Editor(json.load(fh))
assert data.list("Node") == ['Node633', 'Node630', 'Node632', 'Node650', 'Node680', 'Node684']
assert data.get("Node633","id") == {'Node633': {'id':'32'}}

#end
