// tools/autotest/test_eia_recs.glm

#ifexist ../test_eia_recs.py
#define DIR=..
#endif

// prevents the simulation from starting a clock
#set compileonly=TRUE
#set warn=FALSE

// load the RECS data and calculate the floor area statistics
#begin python
import gridlabd.eia_recs as eia_recs
import numpy
fips = eia_recs.Microdata.get_division("CA")
codes = eia_recs.Microdata.get_codes(**fips)
recs = eia_recs.Microdata()
data = recs[recs["DIVISION"]==codes["division"]]
avg = numpy.log(data["TOTSQFT_EN"]).mean()
std =  numpy.log(data["TOTSQFT_EN"]).std()
#end

// create the same number of homes with a similar log-normal distribution
module residential;
object house:..${PYTHON len(data)}
{
    floor_area random.lognormal(${PYTHON avg},${PYTHON std});
}

// save and plot the results
#set savefile=test_eia_recs.json
#on_exit 0 $GLD_BIN/python3 ${DIR:-.}/test_eia_recs.py test_eia_recs.json test_eia_recs_ignore.png

#ifexist ../test_eia_recs_ignore.py
#on_exit 0 diff ${DIR:-.}/test_eia_recs.json test_eia_recs.json
#endif
