// tools/autotest/test_fit_filter.glm

#ifexist ../test_fit_filter_opt.glm
#define DIR=..
#endif

#python -m gridlabd.fit_filter -o=${DIR:-.}/test_fit_filter_power.csv -i=${DIR:-.}/test_fit_filter_weather.csv -g=test_fit_filter_opt.glm

#include "test_fit_filter_opt.glm"

#ifexist ../test_fit_filter_opt.glm
#on_exit 0 diff -I '^[#/].*' ../test_fit_filter_opt.glm test_fit_filter_opt.glm > gridlabd.diff
#endif
