// example market_data from CAISO

#ifexist ../test_market_data.csv
#define DIR=..
#endif

// OASIS data retention is 39 months. After 39 months, running the below command manually will return a "No data returned" error, so just update the dates and test file.
#python -m gridlabd.market_data -m=CAISO -d=0096WD_7_N001 -s=20250222 -e=20250223 -c=test_market_data.csv -g=test_market_data_opt.glm

clock
{
	timezone "PST+8PDT";
	starttime "2025-02-22 00:00:00 PST";
	stoptime "2025-02-23 00:00:00 PST";
}

module tape
{
	csv_header_type NAME;
}

#include "test_market_data_opt.glm"

object recorder
{
	parent ${MARKET_DATA};
	property "LMP,MW";
	file "test_market_data_out.csv";
}

#ifexist ../test_market_data.csv
#on_exit 0 diff ../test_market_data.csv test_market_data.csv > gridlabd.diff
#endif
