// tools/autotest/noaa_forecast.glm

#if ${github_actions:-no} == no

#python -m gridlabd.noaa_forecast -r=10 -p=37.5,-122.3 -c=test_noaa_forecast.csv -g=test_noaa_forecast_opt.glm -n=test >> gridlabd.err

#include "test_noaa_forecast_opt.glm"

clock
{
    timezone "${NOAA_FORECAST_TIMEZONE}";
    starttime "${NOAA_FORECAST_STARTTIME}";
    stoptime "${NOAA_FORECAST_STOPTIME}";
}

module tape
{
    csv_header_type NONE;
}

object recorder
{
    parent "test";
    file "test_noaa_forecast_ignore.csv";
    property "temperature,wind_speed,wind_dir";
}

#endif
