class forecast
{
	double temperature[degF];
	double wind_speed[m/s];
	double wind_dir[deg];
}
module tape;
#define NOAA_FORECAST_TIMEZONE=${SHELL gridlabd timezone 37.5,-122.3 -f=TZSPEC}
#define NOAA_FORECAST_STARTTIME=2025-02-21T08:00:00-08:00
#define NOAA_FORECAST_STOPTIME=2025-03-06T06:00:00-08:00
object forecast
{
	name "test";
	object player
	{
		file "test_noaa_forecast.csv";
		property "temperature,wind_speed,wind_dir";
	};
}
