#system gridlabd powerline US WA Snohomish -o=test_powerline_opt.glm

#include "test_powerline_opt.glm"

#ifexist "../test_powerline_opt.glm"
#on_exit 0 diff ../test_powerline_opt.glm test_powerline_opt.glm
#endif
