#system gridlabd substation US WA Snohomish -o=test_substation_opt.glm

#include "test_substation_opt.glm"

#ifexist "../test_substation_opt.glm"
#on_exit 0 diff ../test_substation_opt.glm test_substation_opt.glm
#endif
